// SBML level 3 version 2

model hamberg_warfarin_inr_model()
  // model units - time: h

  // Compartments:
  compartment central = 1 liter;

  // Species:
  species s_warfarin in central = 0;  // substance in mg

  // Parameters:
  baseline_inr = 1 dimensionless;
  inr has dimensionless;
  delay_compartment_1_chain_1 = 1 dimensionless;
  delay_compartment_1_chain_2 = 1 dimensionless;
  delay_compartment_2_chain_1 = 1 dimensionless;
  delay_compartment_2_chain_2 = 1 dimensionless;
  relative_change_cf1 = 1 dimensionless;
  relative_change_cf2 = 1 dimensionless;
  gamma = 1 dimensionless;
  half_maximal_effect_concentration = 1 mg_per_l;
  inhibitory_effect has dimensionless;
  maximal_inr_shift = 1 dimensionless;
  maximal_effect = 1 dimensionless;
  transition_rate_chain_1 = 1 per_h;
  transition_rate_chain_2 = 1 per_h;
  clearance = 1 l_per_h;

  // Assignment rules:
  inhibitory_effect := maximal_effect*s_warfarin^gamma/(half_maximal_effect_concentration^gamma + s_warfarin^gamma);
  inr := baseline_inr + maximal_inr_shift*(1 - (relative_change_cf1 + relative_change_cf2)/2);

  // Rate rules:
  delay_compartment_1_chain_1' = transition_rate_chain_1*(1 - inhibitory_effect) - transition_rate_chain_1*delay_compartment_1_chain_1;
  delay_compartment_2_chain_1' = transition_rate_chain_1*delay_compartment_1_chain_1 - transition_rate_chain_1*delay_compartment_2_chain_1;
  relative_change_cf1' = transition_rate_chain_1*delay_compartment_2_chain_1 - transition_rate_chain_1*relative_change_cf1;
  delay_compartment_1_chain_2' = transition_rate_chain_2*(1 - inhibitory_effect) - transition_rate_chain_2*delay_compartment_1_chain_2;
  delay_compartment_2_chain_2' = transition_rate_chain_2*delay_compartment_1_chain_2 - transition_rate_chain_2*delay_compartment_2_chain_2;
  relative_change_cf2' = transition_rate_chain_2*delay_compartment_2_chain_2 - transition_rate_chain_2*relative_change_cf2;

  // Reactions:
  s_warfarin_elimination: s_warfarin => ; clearance*s_warfarin;

  // Unit definitions:
  unit h = 3600 second;
  unit per_h = 1 / (3600 second);
  unit l_per_h = liter / (3600 second);
  unit mg = 1e-3 gram;
  unit mg_per_l = 1e-3 gram / liter;
end
