// SBML level 3 version 2

model hamberg_warfarin_inr_model_with_sensitivities()
  // model units - time: h

  // Parameters:
  baseline_inr = 1 dimensionless;
  inr has dimensionless;
  delay_compartment_1_chain_1 = 1 dimensionless;
  delay_compartment_1_chain_2 = 1 dimensionless;
  delay_compartment_2_chain_1 = 1 dimensionless;
  delay_compartment_2_chain_2 = 1 dimensionless;
  relative_change_cf1 = 1 dimensionless;
  relative_change_cf2 = 1 dimensionless;
  gamma = 1 dimensionless;
  half_maximal_effect_concentration = 1 mg_per_l;
  inhibitory_effect has dimensionless;
  maximal_inr_shift = 1 dimensionless;
  maximal_effect = 1 dimensionless;
  transition_rate_chain_1 = 1 per_h;
  transition_rate_chain_2 = 1 per_h;
  amount_dose_compartment = 1 mg;
  amount_central_compartment = 1 mg;
  concentration_central_compartment has mg_per_l;
  absorption_rate = 1 per_h;
  dose_rate = 1 mg_per_h;
  elimination_rate = 1 per_h;
  volume = 1 liter;
  dconcentration_central_compartment_dvolume has mg_per_l_per_l;
  dconcentration_central_compartment_delimination_rate has mgh_per_l;
  dconcentration_central_compartment_dhalf_maximal_effect_concentration has dimensionless;
  dconcentration_central_compartment_dtransition_rate_chain_1 has mgh_per_l;
  dconcentration_central_compartment_dtransition_rate_chain_2 has mgh_per_l;
  dinr_dvolume has per_l;
  dinr_delimination_rate has h;
  dinr_dhalf_maximal_effect_concentration has l_per_mg;
  dinr_dtransition_rate_chain_1 has h;
  dinr_dtransition_rate_chain_2 has h;
  damount_central_compartment_delimination_rate = 1 mg_per_l;
  drelative_change_cf1_dvolume = 1 per_l;
  drelative_change_cf1_delimination_rate = 1 h;
  drelative_change_cf1_dhalf_maximal_effect_concentration = 1 l_per_mg;
  drelative_change_cf1_dtransition_rate_chain_1 = 1 h;
  drelative_change_cf1_dtransition_rate_chain_2 = 1 h;
  drelative_change_cf2_dvolume = 1 per_l;
  drelative_change_cf2_delimination_rate = 1 h;
  drelative_change_cf2_dhalf_maximal_effect_concentration = 1 l_per_mg;
  drelative_change_cf2_dtransition_rate_chain_1 = 1 h;
  drelative_change_cf2_dtransition_rate_chain_2 = 1 h;
  ddelay_compartment_1_chain_1_dvolume = 1 per_l;
  ddelay_compartment_1_chain_1_delimination_rate = 1 h;
  ddelay_compartment_1_chain_1_dhalf_maximal_effect_concentration = 1 l_per_mg;
  ddelay_compartment_1_chain_1_dtransition_rate_chain_1 = 1 h;
  ddelay_compartment_1_chain_1_dtransition_rate_chain_2 = 1 h;
  ddelay_compartment_1_chain_2_dvolume = 1 per_l;
  ddelay_compartment_1_chain_2_delimination_rate = 1 h;
  ddelay_compartment_1_chain_2_dhalf_maximal_effect_concentration = 1 l_per_mg;
  ddelay_compartment_1_chain_2_dtransition_rate_chain_1 = 1 h;
  ddelay_compartment_1_chain_2_dtransition_rate_chain_2 = 1 h;
  ddelay_compartment_2_chain_1_dvolume = 1 per_l;
  ddelay_compartment_2_chain_1_delimination_rate = 1 h;
  ddelay_compartment_2_chain_1_dhalf_maximal_effect_concentration = 1 l_per_mg;
  ddelay_compartment_2_chain_1_dtransition_rate_chain_1 = 1 h;
  ddelay_compartment_2_chain_1_dtransition_rate_chain_2 = 1 h;
  ddelay_compartment_2_chain_2_dvolume = 1 per_l;
  ddelay_compartment_2_chain_2_delimination_rate = 1 h;
  ddelay_compartment_2_chain_2_dhalf_maximal_effect_concentration = 1 l_per_mg;
  ddelay_compartment_2_chain_2_dtransition_rate_chain_1 = 1 h;
  ddelay_compartment_2_chain_2_dtransition_rate_chain_2 = 1 h;

  // Assignment rules:
  inhibitory_effect := maximal_effect*concentration_central_compartment^gamma/(half_maximal_effect_concentration^gamma + concentration_central_compartment^gamma);
  inr := baseline_inr + maximal_inr_shift*(1 - (relative_change_cf1 + relative_change_cf2)/2);
  concentration_central_compartment := amount_central_compartment/volume;
  dconcentration_central_compartment_dvolume := -1*(amount_central_compartment/volume^2);
  dinr_dvolume := -1*maximal_inr_shift*(relative_change_cf2/2*drelative_change_cf1_dvolume + relative_change_cf1/2*drelative_change_cf2_dvolume);
  dconcentration_central_compartment_delimination_rate := damount_central_compartment_delimination_rate/volume;
  dinr_delimination_rate := -1*maximal_inr_shift*(relative_change_cf2/2*drelative_change_cf1_delimination_rate + relative_change_cf1/2*drelative_change_cf2_delimination_rate);
  dconcentration_central_compartment_dhalf_maximal_effect_concentration := 0*concentration_central_compartment;
  dinr_dhalf_maximal_effect_concentration := -1*maximal_inr_shift*(relative_change_cf2/2*drelative_change_cf1_dhalf_maximal_effect_concentration + relative_change_cf1/2*drelative_change_cf2_dhalf_maximal_effect_concentration);
  dconcentration_central_compartment_dtransition_rate_chain_1 := 0*concentration_central_compartment;
  dinr_dtransition_rate_chain_1 := -1*maximal_inr_shift*drelative_change_cf1_dtransition_rate_chain_1*(relative_change_cf2/2);
  dconcentration_central_compartment_dtransition_rate_chain_2 := 0*concentration_central_compartment;
  dinr_dtransition_rate_chain_2 := -1*maximal_inr_shift*drelative_change_cf1_dtransition_rate_chain_2*(relative_change_cf2/2);

  // Rate rules:
  delay_compartment_1_chain_1' = transition_rate_chain_1*(1 - inhibitory_effect) - transition_rate_chain_1*delay_compartment_1_chain_1;
  delay_compartment_2_chain_1' = transition_rate_chain_1*delay_compartment_1_chain_1 - transition_rate_chain_1*delay_compartment_2_chain_1;
  relative_change_cf1' = transition_rate_chain_1*delay_compartment_2_chain_1 - transition_rate_chain_1*relative_change_cf1;
  delay_compartment_1_chain_2' = transition_rate_chain_2*(1 - inhibitory_effect) - transition_rate_chain_2*delay_compartment_1_chain_2;
  delay_compartment_2_chain_2' = transition_rate_chain_2*delay_compartment_1_chain_2 - transition_rate_chain_2*delay_compartment_2_chain_2;
  relative_change_cf2' = transition_rate_chain_2*delay_compartment_2_chain_2 - transition_rate_chain_2*relative_change_cf2;
  amount_dose_compartment' = dose_rate/2 - absorption_rate*amount_dose_compartment;
  amount_central_compartment' = absorption_rate*amount_dose_compartment - elimination_rate*amount_central_compartment;
  drelative_change_cf1_dvolume' = transition_rate_chain_1*ddelay_compartment_2_chain_1_dvolume - transition_rate_chain_1*drelative_change_cf1_dvolume;
  drelative_change_cf2_dvolume' = transition_rate_chain_2*ddelay_compartment_2_chain_2_dvolume - transition_rate_chain_2*drelative_change_cf2_dvolume;
  ddelay_compartment_2_chain_1_dvolume' = transition_rate_chain_1*ddelay_compartment_1_chain_1_dvolume - transition_rate_chain_1*ddelay_compartment_2_chain_1_dvolume;
  ddelay_compartment_2_chain_2_dvolume' = transition_rate_chain_2*ddelay_compartment_1_chain_2_dvolume - transition_rate_chain_2*ddelay_compartment_2_chain_2_dvolume;
  ddelay_compartment_1_chain_1_dvolume' = transition_rate_chain_1*(dconcentration_central_compartment_dvolume*maximal_effect*gamma*concentration_central_compartment^(gamma - 1)/(half_maximal_effect_concentration^gamma + concentration_central_compartment^gamma)*(concentration_central_compartment/(half_maximal_effect_concentration^gamma + concentration_central_compartment^gamma) - 1) - ddelay_compartment_1_chain_1_dvolume);
  ddelay_compartment_1_chain_2_dvolume' = transition_rate_chain_2*(dconcentration_central_compartment_dvolume*maximal_effect*gamma*concentration_central_compartment^(gamma - 1)/(half_maximal_effect_concentration^gamma + concentration_central_compartment^gamma)*(concentration_central_compartment/(half_maximal_effect_concentration^gamma + concentration_central_compartment^gamma) - 1) - ddelay_compartment_1_chain_2_dvolume);
  damount_central_compartment_delimination_rate' = -1*amount_central_compartment - elimination_rate*damount_central_compartment_delimination_rate;
  drelative_change_cf1_delimination_rate' = transition_rate_chain_1*ddelay_compartment_2_chain_1_delimination_rate - transition_rate_chain_1*drelative_change_cf1_delimination_rate;
  drelative_change_cf2_delimination_rate' = transition_rate_chain_2*ddelay_compartment_2_chain_2_delimination_rate - transition_rate_chain_2*drelative_change_cf2_delimination_rate;
  ddelay_compartment_2_chain_1_delimination_rate' = transition_rate_chain_1*ddelay_compartment_1_chain_1_delimination_rate - transition_rate_chain_1*ddelay_compartment_2_chain_1_delimination_rate;
  ddelay_compartment_2_chain_2_delimination_rate' = transition_rate_chain_2*ddelay_compartment_1_chain_2_delimination_rate - transition_rate_chain_2*ddelay_compartment_2_chain_2_delimination_rate;
  ddelay_compartment_1_chain_1_delimination_rate' = transition_rate_chain_1*(dconcentration_central_compartment_delimination_rate*maximal_effect*gamma*concentration_central_compartment^(gamma - 1)/(half_maximal_effect_concentration^gamma + concentration_central_compartment^gamma)*(concentration_central_compartment/(half_maximal_effect_concentration^gamma + concentration_central_compartment^gamma) - 1) - ddelay_compartment_1_chain_1_delimination_rate);
  ddelay_compartment_1_chain_2_delimination_rate' = transition_rate_chain_2*(dconcentration_central_compartment_delimination_rate*maximal_effect*gamma*concentration_central_compartment^(gamma - 1)/(half_maximal_effect_concentration^gamma + concentration_central_compartment^gamma)*(concentration_central_compartment/(half_maximal_effect_concentration^gamma + concentration_central_compartment^gamma) - 1) - ddelay_compartment_1_chain_2_delimination_rate);
  drelative_change_cf1_dhalf_maximal_effect_concentration' = transition_rate_chain_1*ddelay_compartment_2_chain_1_dhalf_maximal_effect_concentration - transition_rate_chain_1*drelative_change_cf1_dhalf_maximal_effect_concentration;
  drelative_change_cf2_dhalf_maximal_effect_concentration' = transition_rate_chain_2*ddelay_compartment_2_chain_2_dhalf_maximal_effect_concentration - transition_rate_chain_2*drelative_change_cf2_dhalf_maximal_effect_concentration;
  ddelay_compartment_2_chain_1_dhalf_maximal_effect_concentration' = transition_rate_chain_1*ddelay_compartment_1_chain_1_dhalf_maximal_effect_concentration - transition_rate_chain_1*ddelay_compartment_2_chain_1_dhalf_maximal_effect_concentration;
  ddelay_compartment_2_chain_2_dhalf_maximal_effect_concentration' = transition_rate_chain_2*ddelay_compartment_1_chain_2_dhalf_maximal_effect_concentration - transition_rate_chain_2*ddelay_compartment_2_chain_2_dhalf_maximal_effect_concentration;
  ddelay_compartment_1_chain_1_dhalf_maximal_effect_concentration' = transition_rate_chain_1*(maximal_effect*gamma*concentration_central_compartment^gamma*half_maximal_effect_concentration^(gamma - 1)/(half_maximal_effect_concentration^gamma + concentration_central_compartment^gamma)^2 - ddelay_compartment_1_chain_1_dhalf_maximal_effect_concentration);
  ddelay_compartment_1_chain_2_dhalf_maximal_effect_concentration' = transition_rate_chain_2*(maximal_effect*gamma*concentration_central_compartment^gamma*half_maximal_effect_concentration^(gamma - 1)/(half_maximal_effect_concentration^gamma + concentration_central_compartment^gamma)^2 - ddelay_compartment_1_chain_2_dhalf_maximal_effect_concentration);
  drelative_change_cf1_dtransition_rate_chain_1' = delay_compartment_2_chain_1 + transition_rate_chain_1*ddelay_compartment_2_chain_1_dtransition_rate_chain_1 - (relative_change_cf1 + transition_rate_chain_1*drelative_change_cf1_dtransition_rate_chain_1);
  ddelay_compartment_2_chain_1_dtransition_rate_chain_1' = delay_compartment_1_chain_1 + transition_rate_chain_1*ddelay_compartment_1_chain_1_dtransition_rate_chain_1 - (delay_compartment_2_chain_1 + transition_rate_chain_1*ddelay_compartment_2_chain_1_dtransition_rate_chain_1);
  ddelay_compartment_1_chain_1_dtransition_rate_chain_1' = 1 - inhibitory_effect - (delay_compartment_1_chain_1 + transition_rate_chain_1*ddelay_compartment_1_chain_1_dtransition_rate_chain_1);
  drelative_change_cf1_dtransition_rate_chain_2' = delay_compartment_2_chain_2 + transition_rate_chain_2*ddelay_compartment_2_chain_2_dtransition_rate_chain_2 - (relative_change_cf1 + transition_rate_chain_2*drelative_change_cf1_dtransition_rate_chain_2);
  ddelay_compartment_2_chain_2_dtransition_rate_chain_2' = delay_compartment_1_chain_2 + transition_rate_chain_2*ddelay_compartment_1_chain_2_dtransition_rate_chain_2 - (delay_compartment_2_chain_2 + transition_rate_chain_2*ddelay_compartment_2_chain_2_dtransition_rate_chain_2);
  ddelay_compartment_1_chain_2_dtransition_rate_chain_2' = 1 - inhibitory_effect - (delay_compartment_1_chain_2 + transition_rate_chain_2*ddelay_compartment_1_chain_2_dtransition_rate_chain_2);

  // Unit definitions:
  unit h = 3600 second;
  unit per_h = 1 / (3600 second);
  unit l_per_h = liter / (3600 second);
  unit mg = 1e-3 gram;
  unit mg_per_l = 1e-3 gram / liter;
  unit mg_per_h = 1e-3 gram / (3600 second);
  unit mgh_per_l = 1e-3 gram * 3600 second / liter;
  unit l_per_mg = liter / (1e-3 gram);
  unit mg_per_l_per_l = 1e-3 gram / (liter * liter);
  unit per_l = 1 / liter;
end
