// SBML level 3 version 2

model wajima_coagulation_model()
  // model units - time: h

  // Compartments:
  compartment central = 1 liter;
  compartment central_warfarin = 1 liter;
  compartment peripheral_vitamin_k = 1 liter;

  // Species:
  species coagulation_factor_ii in central = 0;  // substance in nmol
  species activated_coagulation_factor_ii in central = 0;  // substance in nmol
  species coagulation_factor_v in central = 0;  // substance in nmol
  species activated_coagulation_factor_v in central = 0;  // substance in nmol
  species coagulation_factor_vii in central = 0;  // substance in nmol
  species activated_coagulation_factor_vii in central = 0;  // substance in nmol
  species coagulation_factor_viii in central = 0;  // substance in nmol
  species activated_coagulation_factor_viii in central = 0;  // substance in nmol
  species coagulation_factor_ix in central = 0;  // substance in nmol
  species activated_coagulation_factor_ix in central = 0;  // substance in nmol
  species coagulation_factor_x in central = 0;  // substance in nmol
  species activated_coagulation_factor_x in central = 0;  // substance in nmol
  species coagulation_factor_xi in central = 0;  // substance in nmol
  species activated_coagulation_factor_xi in central = 0;  // substance in nmol
  species coagulation_factor_xii in central = 0;  // substance in nmol
  species activated_coagulation_factor_xii in central = 0;  // substance in nmol
  species coagulation_factor_xiii in central = 0;  // substance in nmol
  species activated_coagulation_factor_xiii in central = 0;  // substance in nmol
  species contact_system_activator in central = 0;  // substance in nmol
  species fibrin in central = 0;  // substance in nmol
  species cross_linked_fibrin in central = 0;  // substance in nmol
  species fibrin_degradation_product in central = 0;  // substance in nmol
  species d_dimer in central = 0;  // substance in nmol
  species fibrinogen in central = 0;  // substance in nmol
  species kallikrein in central = 0;  // substance in nmol
  species prekallikrein in central = 0;  // substance in nmol
  species plasmin in central = 0;  // substance in nmol
  species plasminogen in central = 0;  // substance in nmol
  species protein_c in central = 0;  // substance in nmol
  species activated_protein_c in central = 0;  // substance in nmol
  species protein_s in central = 0;  // substance in nmol
  species thrombomodulin in central = 0;  // substance in nmol
  species tissue_factor in central = 0;  // substance in nmol
  species tissue_factor_pathway_inhibitor in central = 0;  // substance in nmol
  species warfarin in central_warfarin = 0;  // substance in mg
  species vitamin_k in central = 0;  // substance in nmol
  species vitamin_k_epoxide in central = 0;  // substance in nmol
  species vitamin_k_hydroquinone in central = 1/central;  // substance in nmol
  species vitamin_k_peripheral in peripheral_vitamin_k = 0;  // substance in nmol
  species aii_atiii_heparin_complex in central = 0;  // substance in nmol
  species aii_at_complex in central = 0;  // substance in nmol
  species aii_tmod_complex in central = 0;  // substance in nmol
  species av_ax_complex in central = 0;  // substance in nmol
  species vii_tf_complex in central = 0;  // substance in nmol
  species avii_tf_complex in central = 0;  // substance in nmol
  species avii_tf_ax_tfpi_complex in central = 0;  // substance in nmol
  species aix_aviii_complex in central = 0;  // substance in nmol
  species aix_atiii_heparin_complex in central = 0;  // substance in nmol
  species ax_atiii_heparin_complex_complex in central = 0;  // substance in nmol
  species ax_tfpi_complex in central = 0;  // substance in nmol
  species apc_ps_complex in central = 0;  // substance in nmol
  species atiii_heparin_complex in central = 0;  // substance in nmol

  // Parameters:
  degradation_rate_ii = 1 per_h;
  degradation_rate_ii_activated = 1 per_h;
  half_maximal_effect_concentration_av_ax_complex_ii = 10 nmol_per_l;
  half_maximal_effect_concentration_ax_ii = 10 nmol_per_l;
  maximal_activation_rate_av_ax_complex_ii = 70 per_h;
  maximal_activation_rate_ax_ii = 0.00007 per_h;
  production_rate_ii = 1 per_h;
  degradation_rate_v = 1 per_h;
  degradation_rate_v_activated = 1 per_h;
  half_maximal_effect_concentration_thrombin_v = 10 nmol_per_l;
  half_maximal_effect_concentration_apc_ps_complex_av = 1 nmol_per_l;
  maximal_activation_rate_thrombin_v = 70 per_h;
  maximal_degradation_rate_apc_ps_complex_av = 50 per_h;
  production_rate_v = 1 nmol_per_l_per_h;
  degradation_rate_vii = 1 per_h;
  degradation_rate_vii_activated = 1 per_h;
  half_maximal_effect_concentration_thrombin_vii = 10 nmol_per_l;
  half_maximal_effect_concentration_aix_vii = 10 nmol_per_l;
  half_maximal_effect_concentration_ax_vii = 10 nmol_per_l;
  half_maximal_effect_concentration_avii_tf_complex_vii = 10 nmol_per_l;
  maximal_activation_rate_thrombin_vii = 0.1 per_h;
  maximal_activation_rate_aix_vii = 0.2 per_h;
  maximal_activation_rate_ax_vii = 1 per_h;
  maximal_activation_rate_avii_tf_complex_vii = 1 per_h;
  production_rate_vii = 1 per_h;
  degradation_rate_viii = 1 per_h;
  degradation_rate_viii_activated = 1 per_h;
  half_maximal_effect_concentration_thrombin_viii = 10 nmol_per_l;
  half_maximal_effect_concentration_apc_ps_complex_aviii = 1 nmol_per_l;
  maximal_activation_rate_thrombin_viii = 70 per_h;
  maximal_degradation_rate_apc_ps_complex_aviii = 50 per_h;
  production_rate_viii = 1 nmol_per_l_per_h;
  degradation_rate_ix = 1 per_h;
  degradation_rate_ix_activated = 1 per_h;
  half_maximal_effect_concentration_avii_tf_complex_ix = 1 nmol_per_l;
  half_maximal_effect_concentration_axi_ix = 10 nmol_per_l;
  maximal_activation_rate_avii_tf_complex_ix = 70 per_h;
  maximal_activation_rate_axi_ix = 7 per_h;
  production_rate_ix = 1 per_h;
  degradation_rate_x = 1 per_h;
  degradation_rate_x_activated = 1 per_h;
  half_maximal_effect_concentration_avii_x = 10 nmol_per_l;
  half_maximal_effect_concentration_avii_tf_complex_x = 1 nmol_per_l;
  half_maximal_effect_concentration_aix_x = 890 nmol_per_l;
  half_maximal_effect_concentration_aix_aviii_complex_x = 10 nmol_per_l;
  maximal_activation_rate_avii_x = 0.001 per_h;
  maximal_activation_rate_avii_tf_complex_x = 70 per_h;
  maximal_activation_rate_aix_x = 3 per_h;
  maximal_activation_rate_aix_aviii_complex_x = 74 per_h;
  production_rate_x = 1 per_h;
  degradation_rate_xi = 1 per_h;
  degradation_rate_xi_activated = 1 per_h;
  half_maximal_effect_concentration_axii_xi = 1 nmol_per_l;
  half_maximal_effect_concentration_thrombin_xi = 10 nmol_per_l;
  maximal_activation_rate_axii_xi = 7 per_h;
  maximal_activation_rate_thrombin_xi = 10 per_h;
  production_rate_xi = 1 nmol_per_l_per_h;
  degradation_rate_xii = 1 per_h;
  degradation_rate_xii_activated = 1 per_h;
  half_maximal_effect_concentration_ca_xii = 1 nmol_per_l;
  half_maximal_effect_concentration_kallikrein_xii = 1 nmol_per_l;
  maximal_activation_rate_ca_xii = 7 per_h;
  maximal_activation_rate_kallikrein_xii = 70 per_h;
  production_rate_xii = 1 nmol_per_l_per_h;
  degradation_rate_xiii = 1 per_h;
  degradation_rate_xiii_activated = 1 per_h;
  half_maximal_effect_concentration_thrombin_xiii = 1 nmol_per_l;
  maximal_activation_rate_thrombin_xiii = 7 per_h;
  production_rate_xiii = 1 nmol_per_l_per_h;
  degradation_rate_ca = 1 per_h;
  degradation_rate_fibrinogen = 1 per_h;
  degradation_rate_fibrin = 1 per_h;
  degradation_rate_xf = 1 per_h;
  half_maximal_effect_concentration_axiii_fibrin = 10 nmol_per_l;
  half_maximal_effect_concentration_thrombin_fibrinogen = 10 nmol_per_l;
  half_maximal_effect_concentration_plasmin_fibrinogen = 100 nmol_per_l;
  half_maximal_effect_concentration_plasmin_fibrin = 10 nmol_per_l;
  half_maximal_effect_concentration_plasmin_xf = 1 nmol_per_l;
  half_maximal_effect_concentration_apc_ps_complex_xf = 1 nmol_per_l;
  maximal_conversion_rate_axiii_fibrin = 7 per_h;
  maximal_conversion_rate_thrombin_fibrinogen = 7 per_h;
  maximal_degradation_rate_plasmin_fibrinogen = 7 per_h;
  maximal_degradation_rate_plasmin_fibrin = 7 per_h;
  maximal_degradation_rate_plasmin_xf = 7 per_h;
  maximal_degradation_rate_apc_ps_complex_xf = 1 per_h;
  production_rate_fibrinogen = 1 nmol_per_l_per_h;
  degradation_rate_fdp = 1 per_h;
  degradation_rate_d_dimer = 1 per_h;
  degradation_rate_kallikrein = 1 per_h;
  degradation_rate_prekallikrein = 1 per_h;
  half_maximal_effect_concentration_axii_prekallikrein = 1 nmol_per_l;
  maximal_conversion_rate_axii_prekallikrein = 7 per_h;
  production_rate_prekallikrein = 1 nmol_per_l_per_h;
  degradation_rate_plasminogen = 1 per_h;
  degradation_rate_plasmin = 1 per_h;
  half_maximal_effect_concentration_apc_ps_complex_plasminogen = 1 nmol_per_l;
  half_maximal_effect_concentration_fibrin_plasminogen = 1 nmol_per_l;
  half_maximal_effect_concentration_thrombin_plasminogen = 1 nmol_per_l;
  maximal_conversion_rate_apc_ps_complex_plasminogen = 2 per_h;
  maximal_conversion_rate_fibrin_plasminogen = 70 per_h;
  maximal_conversion_rate_thrombin_plasminogen = 7 per_h;
  production_rate_plasminogen = 1 nmol_per_l_per_h;
  degradation_rate_pc = 1 per_h;
  degradation_rate_pc_activated = 1 per_h;
  half_maximal_effect_concentration_aii_tmod_complex_pc = 1 nmol_per_l;
  maximal_activation_rate_aii_tmod_complex_pc = 7 per_h;
  production_rate_pc = 1 per_h;
  degradation_rate_ps = 1 per_h;
  production_rate_ps = 1 per_h;
  degradation_rate_tmod = 1 per_h;
  production_rate_tmod = 1 nmol_per_l_per_h;
  degradation_rate_tissue_factor = 1 per_h;
  conversion_rate_vk_vkh2 = 1 per_h;
  conversion_rate_vkh2_vko = 1 per_h;
  conversion_rate_vko_vk = 1 per_h;
  elimination_rate_vk = 1 per_h;
  half_maximal_effect_concentration_warfarin = 0.34 mg_per_l;
  maximal_inhibitory_effect_warfarin = 1 dimensionless;
  transition_rate_vk_central_to_peripheral = 1 per_h;
  transition_rate_vk_peripheral_to_central = 1 per_h;
  input_rate_vk = 1 nmol_per_l_per_h;
  elimination_rate_warfarin = 1 per_h;
  gamma = 1 dimensionless;
  degradation_rate_tfpi = 1 per_h;
  production_rate_tfpi = 1 nmol_per_l_per_h;
  degradation_rate_tat = 1 per_h;
  complex_formation_rate_aii_atiii_heparin_complex = 0.1 l_per_nmol_per_h;
  complex_formation_rate_aii_tmod = 2 l_per_nmol_per_h;
  degradation_rate_aii_tmod_complex = 1 per_h;
  complex_formation_rate_av_ax = 2 l_per_nmol_per_h;
  degradation_rate_av_ax_complex = 1 per_h;
  half_maximal_effect_concentration_apc_ps_complex_av_ax_complex = 1 nmol_per_l;
  maximal_degradation_rate_apc_ps_complex_av_ax_complex = 2 per_h;
  complex_formation_rate_vii_tf = 2 l_per_nmol_per_h;
  degradation_rate_vii_tf_complex = 1 per_h;
  half_maximal_effect_concentration_ax_vii_tf_complex = 1 nmol_per_l;
  half_maximal_effect_concentration_tf_vii_tf_complex = 1 nmol_per_l;
  maximal_activation_rate_ax_vii_tf_complex = 70 per_h;
  maximal_activation_rate_tf_vii_tf_complex = 70 per_h;
  complex_formation_rate_avii_tf = 2 l_per_nmol_per_h;
  degradation_rate_avii_tf_complex = 1 per_h;
  complex_formation_rate_aix_atiii_heparin_complex = 1 l_per_nmol_per_h;
  complex_formation_rate_aix_aviii = 2 l_per_nmol_per_h;
  degradation_rate_aix_aviii_complex = 1 per_h;
  complex_formation_rate_ax_atiii_heparin_complex = 1 l_per_nmol_per_h;
  complex_formation_rate_ax_tfpi = 2 l_per_nmol_per_h;
  degradation_rate_ax_tfpi_complex = 1 per_h;
  complex_formation_rate_apc_ps = 2 l_per_nmol_per_h;
  degradation_rate_apc_ps_complex = 1 per_h;
  complex_formation_rate_avii_tf_ax_tfpi = 2 l_per_nmol_per_h;
  degradation_rate_avii_tf_ax_tfpi_complex = 1 per_h;
  elimination_rate_atiii_heparin_complex = 1 per_h;

  // Reactions:
  atiii_heparin_complex_elimination: atiii_heparin_complex => ; central*elimination_rate_atiii_heparin_complex*atiii_heparin_complex;
  prothrombin_production: => coagulation_factor_ii; central*production_rate_ii*vitamin_k_hydroquinone;  // modifiers: vitamin_k_hydroquinone
  prothrombin_degradation: coagulation_factor_ii => ; central*degradation_rate_ii*coagulation_factor_ii;
  av_ax_complex_prothrombin_activation: coagulation_factor_ii => activated_coagulation_factor_ii; central*maximal_activation_rate_av_ax_complex_ii*av_ax_complex*coagulation_factor_ii/(half_maximal_effect_concentration_av_ax_complex_ii + av_ax_complex);  // modifiers: av_ax_complex
  ax_prothrombin_activation: coagulation_factor_ii => activated_coagulation_factor_ii; central*maximal_activation_rate_ax_ii*activated_coagulation_factor_x*coagulation_factor_ii/(half_maximal_effect_concentration_ax_ii + activated_coagulation_factor_x);  // modifiers: activated_coagulation_factor_x
  thrombin_degradation: activated_coagulation_factor_ii => aii_at_complex; central*degradation_rate_ii_activated*activated_coagulation_factor_ii;
  aii_atiii_heparin_complex_formation: activated_coagulation_factor_ii + atiii_heparin_complex => aii_atiii_heparin_complex; central*complex_formation_rate_aii_atiii_heparin_complex*activated_coagulation_factor_ii*atiii_heparin_complex;
  tat_degradation: aii_at_complex => ; central*degradation_rate_tat*aii_at_complex;
  aii_tmod_complex_formation: activated_coagulation_factor_ii + thrombomodulin => aii_tmod_complex; central*complex_formation_rate_aii_tmod*activated_coagulation_factor_ii*thrombomodulin;
  aii_tmod_complex_degradation: aii_tmod_complex => ; central*degradation_rate_aii_tmod_complex*aii_tmod_complex;
  v_production: => coagulation_factor_v; central*production_rate_v;
  v_degradation: coagulation_factor_v => ; central*degradation_rate_v*coagulation_factor_v;
  thrombin_v_activation: coagulation_factor_v => activated_coagulation_factor_v; central*maximal_activation_rate_thrombin_v*activated_coagulation_factor_ii*coagulation_factor_v/(half_maximal_effect_concentration_thrombin_v + activated_coagulation_factor_ii);  // modifiers: activated_coagulation_factor_ii
  av_degradation: activated_coagulation_factor_v => ; central*degradation_rate_v_activated*activated_coagulation_factor_v;
  apc_ps_complex_av_degradation: activated_coagulation_factor_v => ; central*maximal_degradation_rate_apc_ps_complex_av*apc_ps_complex*activated_coagulation_factor_v/(half_maximal_effect_concentration_apc_ps_complex_av + apc_ps_complex);  // modifiers: apc_ps_complex
  av_ax_complex_formation: activated_coagulation_factor_v + activated_coagulation_factor_x => av_ax_complex; central*complex_formation_rate_av_ax*activated_coagulation_factor_v*activated_coagulation_factor_x;
  av_ax_complex_degradation: av_ax_complex => ; central*degradation_rate_av_ax_complex*av_ax_complex;
  apc_ps_complex_av_ax_complex_degradation: av_ax_complex => ; central*maximal_degradation_rate_apc_ps_complex_av_ax_complex*apc_ps_complex*av_ax_complex/(half_maximal_effect_concentration_apc_ps_complex_av_ax_complex + apc_ps_complex);  // modifiers: apc_ps_complex
  vii_production: => coagulation_factor_vii; central*production_rate_vii*vitamin_k_hydroquinone;  // modifiers: vitamin_k_hydroquinone
  vii_degradation: coagulation_factor_vii => ; central*degradation_rate_vii*coagulation_factor_vii;
  thrombin_vii_activation: coagulation_factor_vii => activated_coagulation_factor_vii; central*maximal_activation_rate_thrombin_vii*activated_coagulation_factor_ii*coagulation_factor_vii/(half_maximal_effect_concentration_thrombin_vii + activated_coagulation_factor_ii);  // modifiers: activated_coagulation_factor_ii
  aix_vii_activation: coagulation_factor_vii => activated_coagulation_factor_vii; central*maximal_activation_rate_aix_vii*activated_coagulation_factor_ix*coagulation_factor_vii/(half_maximal_effect_concentration_aix_vii + activated_coagulation_factor_ix);  // modifiers: activated_coagulation_factor_ix
  ax_vii_activation: coagulation_factor_vii => activated_coagulation_factor_vii; central*maximal_activation_rate_ax_vii*activated_coagulation_factor_x*coagulation_factor_vii/(half_maximal_effect_concentration_ax_vii + activated_coagulation_factor_x);  // modifiers: activated_coagulation_factor_x
  avii_tf_complex_vii_activation: coagulation_factor_vii => activated_coagulation_factor_vii; central*maximal_activation_rate_avii_tf_complex_vii*avii_tf_complex*coagulation_factor_vii/(half_maximal_effect_concentration_avii_tf_complex_vii + avii_tf_complex);  // modifiers: avii_tf_complex
  vii_tf_complex_formation: coagulation_factor_vii + tissue_factor => vii_tf_complex; central*complex_formation_rate_vii_tf*coagulation_factor_vii*tissue_factor;
  vii_tf_complex_degradation: vii_tf_complex => ; central*degradation_rate_vii_tf_complex*vii_tf_complex;
  ax_vii_tf_complex_activation: vii_tf_complex => avii_tf_complex; central*maximal_activation_rate_ax_vii_tf_complex*activated_coagulation_factor_x*vii_tf_complex/(half_maximal_effect_concentration_ax_vii_tf_complex + activated_coagulation_factor_x);  // modifiers: activated_coagulation_factor_x
  tf_vii_tf_complex_activation: vii_tf_complex => avii_tf_complex; central*maximal_activation_rate_tf_vii_tf_complex*tissue_factor*vii_tf_complex/(half_maximal_effect_concentration_tf_vii_tf_complex + tissue_factor);  // modifiers: tissue_factor
  activated_vii_degradation: activated_coagulation_factor_vii => ; central*degradation_rate_vii_activated*activated_coagulation_factor_vii;
  avii_tf_complex_formation: activated_coagulation_factor_vii + tissue_factor => avii_tf_complex; central*complex_formation_rate_avii_tf*activated_coagulation_factor_vii*tissue_factor;
  avii_tf_complex_degradation: avii_tf_complex => ; central*degradation_rate_avii_tf_complex*avii_tf_complex;
  avii_tf_ax_tfpi_complex_formation: avii_tf_complex + ax_tfpi_complex => avii_tf_ax_tfpi_complex; central*complex_formation_rate_avii_tf_ax_tfpi*avii_tf_complex*ax_tfpi_complex;
  avii_tf_ax_tfpi_complex_degradation: avii_tf_ax_tfpi_complex => ; central*degradation_rate_avii_tf_ax_tfpi_complex*avii_tf_ax_tfpi_complex;
  viii_production: => coagulation_factor_viii; central*production_rate_viii;
  viii_degradation: coagulation_factor_viii => ; central*degradation_rate_viii*coagulation_factor_viii;
  thrombin_viii_activation: coagulation_factor_viii => activated_coagulation_factor_viii; central*maximal_activation_rate_thrombin_viii*activated_coagulation_factor_ii*coagulation_factor_viii/(half_maximal_effect_concentration_thrombin_viii + activated_coagulation_factor_ii);  // modifiers: activated_coagulation_factor_ii
  activated_viii_degradation: activated_coagulation_factor_viii => ; central*degradation_rate_viii_activated*activated_coagulation_factor_viii;
  apc_ps_complex_activated_viii_degradation: activated_coagulation_factor_viii => ; central*maximal_degradation_rate_apc_ps_complex_aviii*apc_ps_complex*activated_coagulation_factor_viii/(half_maximal_effect_concentration_apc_ps_complex_aviii + apc_ps_complex);  // modifiers: apc_ps_complex
  ix_production: => coagulation_factor_ix; central*production_rate_ix*vitamin_k_hydroquinone;  // modifiers: vitamin_k_hydroquinone
  ix_degradation: coagulation_factor_ix => ; central*degradation_rate_ix*coagulation_factor_ix;
  axi_ix_activation: coagulation_factor_ix => activated_coagulation_factor_ix; central*maximal_activation_rate_axi_ix*activated_coagulation_factor_xi*coagulation_factor_ix/(half_maximal_effect_concentration_axi_ix + activated_coagulation_factor_xi);  // modifiers: activated_coagulation_factor_xi
  avii_tf_complex_ix_activation: coagulation_factor_ix => activated_coagulation_factor_ix; central*maximal_activation_rate_avii_tf_complex_ix*avii_tf_complex*coagulation_factor_ix/(half_maximal_effect_concentration_avii_tf_complex_ix + avii_tf_complex);  // modifiers: avii_tf_complex
  activated_ix_degradation: activated_coagulation_factor_ix => ; central*degradation_rate_ix_activated*activated_coagulation_factor_ix;
  aix_aviii_complex_formation: activated_coagulation_factor_viii + activated_coagulation_factor_ix => aix_aviii_complex; central*complex_formation_rate_aix_aviii*activated_coagulation_factor_ix*activated_coagulation_factor_viii;
  aix_aviii_complex_degradation: aix_aviii_complex => ; central*degradation_rate_aix_aviii_complex*aix_aviii_complex;
  aix_atiii_heparin_complex_formation: activated_coagulation_factor_ix + atiii_heparin_complex => aix_atiii_heparin_complex; central*complex_formation_rate_aix_atiii_heparin_complex*activated_coagulation_factor_ix*atiii_heparin_complex;
  x_production: => coagulation_factor_x; central*production_rate_x*vitamin_k_hydroquinone;  // modifiers: vitamin_k_hydroquinone
  x_degradation: coagulation_factor_x => ; central*degradation_rate_x*coagulation_factor_x;
  avii_x_activation: coagulation_factor_x => activated_coagulation_factor_x; central*maximal_activation_rate_avii_x*activated_coagulation_factor_vii*coagulation_factor_x/(half_maximal_effect_concentration_avii_x + activated_coagulation_factor_vii);  // modifiers: activated_coagulation_factor_vii
  avii_tf_complex_x_activation: coagulation_factor_x => activated_coagulation_factor_x; central*maximal_activation_rate_avii_tf_complex_x*avii_tf_complex*coagulation_factor_x/(half_maximal_effect_concentration_avii_tf_complex_x + avii_tf_complex);  // modifiers: avii_tf_complex
  aix_x_activation: coagulation_factor_x => activated_coagulation_factor_x; central*maximal_activation_rate_aix_x*activated_coagulation_factor_ix*coagulation_factor_x/(half_maximal_effect_concentration_aix_x + activated_coagulation_factor_ix);  // modifiers: activated_coagulation_factor_ix
  aix_aviii_complex_x_activation: coagulation_factor_x => activated_coagulation_factor_x; central*maximal_activation_rate_aix_aviii_complex_x*aix_aviii_complex*coagulation_factor_x/(half_maximal_effect_concentration_aix_aviii_complex_x + aix_aviii_complex);  // modifiers: aix_aviii_complex
  ax_degradation: activated_coagulation_factor_x => ; central*degradation_rate_x_activated*activated_coagulation_factor_x;
  ax_atiii_heparin_complex_complex_formation: activated_coagulation_factor_x + atiii_heparin_complex => ax_atiii_heparin_complex_complex; central*complex_formation_rate_ax_atiii_heparin_complex*activated_coagulation_factor_x*atiii_heparin_complex;
  ax_tfpi_complex_formation: activated_coagulation_factor_x + tissue_factor_pathway_inhibitor => ax_tfpi_complex; central*complex_formation_rate_ax_tfpi*activated_coagulation_factor_x*tissue_factor_pathway_inhibitor;
  ax_tfpi_complex_degradation: ax_tfpi_complex => ; central*degradation_rate_ax_tfpi_complex*ax_tfpi_complex;
  xi_production: => coagulation_factor_xi; central*production_rate_xi;
  xi_degradation: coagulation_factor_xi => ; central*degradation_rate_xi*coagulation_factor_xi;
  thrombin_xi_activation: coagulation_factor_xi => activated_coagulation_factor_xi; central*maximal_activation_rate_thrombin_xi*activated_coagulation_factor_ii*coagulation_factor_xi/(half_maximal_effect_concentration_thrombin_xi + activated_coagulation_factor_ii);  // modifiers: activated_coagulation_factor_ii
  axii_xi_activation: coagulation_factor_xi => activated_coagulation_factor_xi; central*maximal_activation_rate_axii_xi*activated_coagulation_factor_xii*coagulation_factor_xi/(half_maximal_effect_concentration_axii_xi + activated_coagulation_factor_xii);  // modifiers: activated_coagulation_factor_xii
  activated_xi_degradation: activated_coagulation_factor_xi => ; central*degradation_rate_xi_activated*activated_coagulation_factor_xi;
  xii_production: => coagulation_factor_xii; central*production_rate_xii;
  xii_degradation: coagulation_factor_xii => ; central*degradation_rate_xii*coagulation_factor_xii;
  ca_xii_activation: coagulation_factor_xii => activated_coagulation_factor_xii; central*maximal_activation_rate_ca_xii*contact_system_activator*coagulation_factor_xii/(half_maximal_effect_concentration_ca_xii + contact_system_activator);  // modifiers: contact_system_activator
  kallikrein_xii_activation: coagulation_factor_xii => activated_coagulation_factor_xii; central*maximal_activation_rate_kallikrein_xii*kallikrein*coagulation_factor_xii/(half_maximal_effect_concentration_kallikrein_xii + kallikrein);  // modifiers: kallikrein
  activated_xii_degradation: activated_coagulation_factor_xii => ; central*degradation_rate_xii_activated*activated_coagulation_factor_xii;
  xiii_production: => coagulation_factor_xiii; central*production_rate_xiii;
  xiii_degradation: coagulation_factor_xiii => ; central*degradation_rate_xiii*coagulation_factor_xiii;
  thrombin_xiii_activation: coagulation_factor_xiii => activated_coagulation_factor_xiii; central*maximal_activation_rate_thrombin_xiii*activated_coagulation_factor_ii*coagulation_factor_xiii/(half_maximal_effect_concentration_thrombin_xiii + activated_coagulation_factor_ii);  // modifiers: activated_coagulation_factor_ii
  axiii_degradation: activated_coagulation_factor_xiii => ; central*degradation_rate_xiii_activated*activated_coagulation_factor_xiii;
  ca_degradation: contact_system_activator => ; central*degradation_rate_ca*contact_system_activator;
  fibrinogen_production: => fibrinogen; central*production_rate_fibrinogen;
  fibrinogen_degradation: fibrinogen => fibrin_degradation_product; central*degradation_rate_fibrinogen*fibrinogen;
  thrombin_fibrinogen_conversion: fibrinogen => fibrin; central*maximal_conversion_rate_thrombin_fibrinogen*activated_coagulation_factor_ii*fibrinogen/(half_maximal_effect_concentration_thrombin_fibrinogen + activated_coagulation_factor_ii);  // modifiers: activated_coagulation_factor_ii
  plasmin_fibrinogen_degradation: fibrinogen => fibrin_degradation_product; central*maximal_degradation_rate_plasmin_fibrinogen*plasmin*fibrinogen/(half_maximal_effect_concentration_plasmin_fibrinogen + plasmin);  // modifiers: plasmin
  fibrin_degradation: fibrin => fibrin_degradation_product; central*degradation_rate_fibrin*fibrin;
  axiii_fibrin_conversion: fibrin => cross_linked_fibrin; central*maximal_conversion_rate_axiii_fibrin*activated_coagulation_factor_xiii*fibrin/(half_maximal_effect_concentration_axiii_fibrin + activated_coagulation_factor_xiii);  // modifiers: activated_coagulation_factor_xiii
  plasmin_fibrin_degradation: fibrin => fibrin_degradation_product; central*maximal_degradation_rate_plasmin_fibrin*plasmin*fibrin/(half_maximal_effect_concentration_plasmin_fibrin + plasmin);  // modifiers: plasmin
  xf_degradation: cross_linked_fibrin => d_dimer; central*degradation_rate_xf*cross_linked_fibrin;
  plasmin_xf_degradation: cross_linked_fibrin => d_dimer; central*maximal_degradation_rate_plasmin_xf*plasmin*cross_linked_fibrin/(half_maximal_effect_concentration_plasmin_xf + plasmin);  // modifiers: plasmin
  apc_ps_complex_xf_degradation: cross_linked_fibrin => d_dimer; central*maximal_degradation_rate_apc_ps_complex_xf*apc_ps_complex*cross_linked_fibrin/(half_maximal_effect_concentration_apc_ps_complex_xf + apc_ps_complex);  // modifiers: apc_ps_complex
  fdp_degradation: fibrin_degradation_product => ; central*degradation_rate_fdp*fibrin_degradation_product;
  d_dimer_degradation: d_dimer => ; central*degradation_rate_d_dimer*d_dimer;
  prekallikrein_production: => prekallikrein; central*production_rate_prekallikrein;
  prekallikrein_degradation: prekallikrein => ; central*degradation_rate_prekallikrein*prekallikrein;
  axii_prekallikrein_conversion: prekallikrein => kallikrein; central*maximal_conversion_rate_axii_prekallikrein*activated_coagulation_factor_xii*prekallikrein/(half_maximal_effect_concentration_axii_prekallikrein + activated_coagulation_factor_xii);  // modifiers: activated_coagulation_factor_xii
  kallikrein_degradation: kallikrein => ; central*degradation_rate_kallikrein*kallikrein;
  plasminogen_production: => plasminogen; central*production_rate_plasminogen;
  plasminogen_degradation: plasminogen => ; central*degradation_rate_plasminogen*plasminogen;
  thrombin_plasminogen_conversion: plasminogen => plasmin; central*maximal_conversion_rate_thrombin_plasminogen*activated_coagulation_factor_ii*plasminogen/(half_maximal_effect_concentration_thrombin_plasminogen + activated_coagulation_factor_ii);  // modifiers: activated_coagulation_factor_ii
  fibrin_plasminogen_conversion: plasminogen => plasmin; central*maximal_conversion_rate_fibrin_plasminogen*fibrin*plasminogen/(half_maximal_effect_concentration_fibrin_plasminogen + fibrin);  // modifiers: fibrin
  apc_ps_complex_plasminogen_conversion: plasminogen => plasmin; central*maximal_conversion_rate_apc_ps_complex_plasminogen*apc_ps_complex*plasminogen/(half_maximal_effect_concentration_apc_ps_complex_plasminogen + apc_ps_complex);  // modifiers: apc_ps_complex
  plasmin_degradation: plasmin => ; central*degradation_rate_plasmin*plasmin;
  protein_c_production: => protein_c; central*production_rate_pc*vitamin_k_hydroquinone;  // modifiers: vitamin_k_hydroquinone
  protein_c_degradation: protein_c => ; central*degradation_rate_pc*protein_c;
  aii_tmod_complex_pc_activation: protein_c => activated_protein_c; central*maximal_activation_rate_aii_tmod_complex_pc*aii_tmod_complex*protein_c/(half_maximal_effect_concentration_aii_tmod_complex_pc + aii_tmod_complex);  // modifiers: aii_tmod_complex
  activated_protein_c_degradation: activated_protein_c => ; central*degradation_rate_pc_activated*activated_protein_c;
  apc_ps_complex_formation: activated_protein_c + protein_s => apc_ps_complex; central*complex_formation_rate_apc_ps*activated_protein_c*protein_s;
  apc_ps_complex_degradation: apc_ps_complex => ; central*degradation_rate_apc_ps_complex*apc_ps_complex;
  protein_s_production: => protein_s; central*production_rate_ps*vitamin_k_hydroquinone;  // modifiers: vitamin_k_hydroquinone
  protein_s_degradation: protein_s => ; central*degradation_rate_ps*protein_s;
  thrombomodulin_production: => thrombomodulin; central*production_rate_tmod;
  thrombomodulin_degradation: thrombomodulin => ; central*degradation_rate_tmod*thrombomodulin;
  tissue_factor_degradation: tissue_factor => ; central*degradation_rate_tissue_factor*tissue_factor;
  tfpi_production: => tissue_factor_pathway_inhibitor; central*production_rate_tfpi;
  tfpi_degradation: tissue_factor_pathway_inhibitor => ; central*degradation_rate_tfpi*tissue_factor_pathway_inhibitor;
  vitamin_k_intake: => vitamin_k; central*input_rate_vk;
  vk_degradation: vitamin_k => ; central*elimination_rate_vk*vitamin_k;
  vitamin_k_conversion: vitamin_k => vitamin_k_hydroquinone; central*conversion_rate_vk_vkh2*vitamin_k*(1 - maximal_inhibitory_effect_warfarin*warfarin^gamma/(half_maximal_effect_concentration_warfarin^gamma + warfarin^gamma));  // modifiers: warfarin
  vkh2_conversion: vitamin_k_hydroquinone => vitamin_k_epoxide; central*conversion_rate_vkh2_vko*vitamin_k_hydroquinone;
  vitamin_k_epoxide_conversion: vitamin_k_epoxide => vitamin_k; central*conversion_rate_vko_vk*vitamin_k_epoxide*(1 - maximal_inhibitory_effect_warfarin*warfarin^gamma/(half_maximal_effect_concentration_warfarin^gamma + warfarin^gamma));  // modifiers: warfarin
  vk_transition_to_peripheral: vitamin_k => vitamin_k_peripheral; central*transition_rate_vk_central_to_peripheral*vitamin_k;
  vk_transition_to_central: vitamin_k_peripheral => vitamin_k; peripheral_vitamin_k*transition_rate_vk_peripheral_to_central*vitamin_k_peripheral;
  warfarin_elimination: warfarin => ; central_warfarin*elimination_rate_warfarin*warfarin;

  // Unit definitions:
  unit h = 3600 second;
  unit per_h = 1 / (3600 second);
  unit mg = 1e-3 gram;
  unit mg_per_l = 1e-3 gram / (10 liter);
  unit nmol = 1e-9 mole;
  unit nmol_per_l = 1e-9 mole / (10 liter);
  unit nmol_per_l_per_h = 1e-9 mole / (10 liter * 3600 second);
  unit l_per_nmol_per_h = 10 liter / (1e-9 mole * 3600 second);
end
