// SBML level 3 version 2

model tmdd_model()
  // model units - time: h

  // Compartments:
  compartment central = 1 liter;

  // Species:
  species drug in central = 0;  // substance in mg
  species target in central = 0;  // substance in mg
  species drug_target_complex in central = 0;  // substance in mg

  // Parameters:
  synthesisation_rate = 1 mg_per_h;
  degradation_rate = 1 per_h;
  binding_rate = 1 per_h;
  dissociation_rate = 1 per_h;
  elimination_rate = 1 per_h;

  // Reactions:
  drug_elimination: drug => ; central*elimination_rate*drug;
  drug_target_complex_formation: drug + target => drug_target_complex; central*binding_rate*drug*target;
  drug_target_complex_dissocation: drug_target_complex => drug + target; central*dissociation_rate*drug_target_complex;
  target_synthesis: => target; central*synthesisation_rate;
  target_degradation: target => ; central*degradation_rate*target;

  // Unit definitions:
  unit h = 3600 second;
  unit per_h = 1 / (3600 second);
  unit l_per_h = liter / (3600 second);
  unit mg = 1e-3 gram;
  unit mg_per_l = 1e-3 gram / liter;
  unit mg_per_h = 1e-3 gram / (3600 second);
end
